*Heading
** Job name: Analysis1 Model name: Model-1
** Generated by: Abaqus/CAE 2022
*Preprint, echo=NO, model=NO, history=NO, contact=NO
**
** PARTS
**
*Part, name=Boom_5m
*Node
      1,           0.,           0.,           0.
      2, 0.0500000007,           0.,           0.
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*Element, type=B31
  1,   1,   2
  2,   2,   3
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*Node
    102,           5.,           0.,           0.
*Nset, nset=Boom_5m-RefPt_, internal
102,
*Nset, nset=_PickedSet2, internal, generate
   1,  101,    1
*Elset, elset=_PickedSet2, internal, generate
   1,  100,    1
*Nset, nset=SET_RP_TIP
 102,
** Section: BoomSection  Profile: Boom_CrossSection
*Beam Section, elset=_PickedSet2, material=Steel, temperature=GRADIENTS, section=BOX
0.14, 0.2, 0.008, 0.008, 0.008, 0.008
0.,0.,1.
*Element, type=MASS, elset=SET_RP_TIP_TipMass_
101, 102
*Mass, elset=SET_RP_TIP_TipMass_
1000.,
*End Part
**
**
** ASSEMBLY
**
*Assembly, name=Assembly
**
*Instance, name=Boom_5m-1, part=Boom_5m
*End Instance
**
*Node
      1,           0.,           0.,           0.
*Nset, nset=ALL_BEAM, instance=Boom_5m-1, generate
   1,  101,    1
*Elset, elset=ALL_BEAM, instance=Boom_5m-1, generate
   1,  100,    1
*Nset, nset=SET_BASE_NODE, instance=Boom_5m-1
 1,
*Nset, nset=SET_RP_BASE
 1,
*Nset, nset=SET_TIP_NODE, instance=Boom_5m-1
 101,
*Surface, type=NODE, name=SET_BASE_NODE_CNS_, internal
SET_BASE_NODE, 1.
*Surface, type=NODE, name=SET_TIP_NODE_CNS_, internal
SET_TIP_NODE, 1.
** Constraint: BASE_MPC
*MPC
BEAM, SET_BASE_NODE, SET_RP_BASE
** Constraint: TIP_MPC
*MPC
BEAM, SET_TIP_NODE, Boom_5m-1.SET_RP_TIP
*End Assembly
*Amplitude, name=AMP_ROT60
             0.,              0.,              3.,             0.2,             10.,             0.7,             15.,              1.
**
** MATERIALS
**
*Material, name=Steel
*Density
7850.,
*Elastic
 2.1e+11, 0.3
** ----------------------------------------------------------------
**
** STEP: StaticEquil
**
*Step, name=StaticEquil, nlgeom=YES
*Static
0.1, 1., 1e-05, 1.
*Matrix Generate
STIFFNESS
MASS
*Matrix Output, STIFFNESS, MASS, FORMAT=COORDINATE
**
** BOUNDARY CONDITIONS
**
** Name: FixedBase Type: Displacement/Rotation
*Boundary
SET_RP_BASE, 1, 1
SET_RP_BASE, 2, 2
SET_RP_BASE, 3, 3
SET_RP_BASE, 4, 4
SET_RP_BASE, 5, 5
SET_RP_BASE, 6, 6
**
** LOADS
**
** Name: GRAV   Type: Gravity
*Dload
ALL_BEAM, GRAV, 9.81, 0., -1., 0.
**
** OUTPUT REQUESTS
**
*Restart, write, frequency=0
**
** FIELD OUTPUT: F-Output-3
**
*Output, field
*Element Output, directions=YES
ALPHA, ALPHAN, CS11, CTSHR, LODE, MISES, MISESMAX, MISESONLY, PRESSONLY, PS, S, SEQUT, SSAVG, TRIAX, TSHR, VS
YIELDPOT
**
** FIELD OUTPUT: F-Output-1
**
*Node Output
RF, U, UR
*Element Output, directions=YES
BF,
**
** HISTORY OUTPUT: H-Output-1
**
*Output, history, variable=PRESELECT
*End Step
** ----------------------------------------------------------------
**
** STEP: ModeShapeAnalysis
**
*Step, name=ModeShapeAnalysis, nlgeom=NO, perturbation
*Frequency, eigensolver=Lanczos, sim, acoustic coupling=on, normalization=mass
20, , , , ,
**
** OUTPUT REQUESTS
**
*Restart, write, frequency=0
**
** FIELD OUTPUT: F-Output-2
**
*Output, field, variable=PRESELECT
**
** HISTORY OUTPUT: H-Output-4
**
*Output, history, variable=PRESELECT
*End Step
** ----------------------------------------------------------------
**
** STEP: LiftBoom
**
*Step, name=LiftBoom, nlgeom=YES, inc=10000
*Dynamic
0.01,15.,1e-06,0.1
**
** BOUNDARY CONDITIONS
**
** Name: FixedBase Type: Displacement/Rotation
*Boundary, op=NEW
** Name: LiftBoomRotation Type: Displacement/Rotation
*Boundary, op=NEW, amplitude=AMP_ROT60
SET_RP_BASE, 1, 1
SET_RP_BASE, 2, 2
SET_RP_BASE, 3, 3
SET_RP_BASE, 4, 4
SET_RP_BASE, 5, 5
SET_RP_BASE, 6, 6, 1.0472
**
** OUTPUT REQUESTS
**
*Restart, write, frequency=0
**
** FIELD OUTPUT: F-Output-3
**
*Output, field, frequency=1
*Element Output, directions=YES
ALPHA, ALPHAN, CS11, CTSHR, LODE, MISES, MISESMAX, MISESONLY, PRESSONLY, PS, S, SEQUT, SSAVG, TRIAX, TSHR, VS
YIELDPOT
**
** FIELD OUTPUT: F-Output-1
**
*Node Output
RF, U, UR
*Element Output, directions=YES
BF,
**
** HISTORY OUTPUT: H-Output-1
**
*Output, history, variable=PRESELECT, frequency=1
**
** HISTORY OUTPUT: HO_RP_BASE_ROT
**
*Output, history
*Node Output, nset=SET_RP_BASE
U1, U2, U3, UR1, UR2, UR3
**
** HISTORY OUTPUT: H-Output-2
**
*Node Output, nset=Boom_5m-1.SET_RP_TIP
U1, U2, U3, UR1, UR2, UR3
*End Step
